New XYCurve.MyPvsT npts=4 xarray=[0, 25, 75, 100] yarray=[1.2, 1.0, 0.8, 0.6]

New XYCurve.MyEff npts=4 xarray=[0.1, 0.2, 0.4, 1.0] yarray=[0.86, 0.90, 0.93, 0.97]

New Tshape.MyTemp npts=288 mInterval=5 temp=[25.0, 25.0, 25.0, 25.0, 25.0, 25.0, 25.0, 25.0, 25.0, 25.0, 25.0, 25.0, 25.0, 25.0, 25.0, 25.0, 25.0, 25.0, 25.0, 25.0, 25.0, 25.0, 25.0, 25.0]
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
! New Tshape.Mytemp npts=24 interval=1 temp=[25, 25, 25, 25, 25, 25, 25, 25, 35, 40, 45, 50, 60, 60, 55, 40, 35, 30, 25, 25, 25, 25, 25, 25]

New PVSystem.PV phases=3 Bus1=97 kV=4.16 kVA=1000 irrad=0.8 Pmpp=1000
~ temperature=25 PF=1 EffCurve=MyEff P-TCurve=MyPvsT
~ Daily=my_shape2_pv TDaily=MyTemp
~ Vminpu=0.001
~ Model=1

New PVSystem.PV-2 phases=3 Bus1=29 kV=4.16 kVA=1000 irrad=0.8 Pmpp=1000
~ temperature=25 PF=1 EffCurve=MyEff P-TCurve=MyPvsT
~ Daily=my_shape2_pv TDaily=MyTemp
~ Vminpu=0.001
~ Model=1

New PVSystem.PV-3 phases=1 Bus1=114.1 kV=2.4 kVA=1000 irrad=0.8 Pmpp=1000
~ temperature=25 PF=1 EffCurve=MyEff P-TCurve=MyPvsT
~ Daily=my_shape2_pv TDaily=MyTemp
~ Vminpu=0.001
~ Model=1

New PVSystem.PV-4 phases=1 Bus1=92.3 kV=2.4 kVA=1000 irrad=0.8 Pmpp=1000
~ temperature=25 PF=1 EffCurve=MyEff P-TCurve=MyPvsT
~ Daily=my_shape2_pv TDaily=MyTemp
~ Vminpu=0.001
~ Model=1

New PVSystem.PV-5 phases=1 Bus1=20.1 kV=2.4 kVA=1000 irrad=0.8 Pmpp=1000
~ temperature=25 PF=1 EffCurve=MyEff P-TCurve=MyPvsT
~ Daily=my_shape2_pv TDaily=MyTemp
~ Vminpu=0.001
~ Model=1

New PVSystem.PV-6 phases=3 Bus1=52 kV=4.16 kVA=1000 irrad=0.8 Pmpp=1000
~ temperature=25 PF=1 EffCurve=MyEff P-TCurve=MyPvsT
~ Daily=my_shape2_pv TDaily=MyTemp
~ Vminpu=0.001
~ Model=1

New PVSystem.PV-7 phases=3 Bus1=151 kV=4.16 kVA=1000 irrad=0.8 Pmpp=1000
~ temperature=25 PF=1 EffCurve=MyEff P-TCurve=MyPvsT
~ Daily=my_shape2_pv TDaily=MyTemp
~ Vminpu=0.001
~ Model=1

New PVSystem.PV-8 phases=1 Bus1=85.3 kV=2.4 kVA=1000 irrad=0.8 Pmpp=1000
~ temperature=25 PF=1 EffCurve=MyEff P-TCurve=MyPvsT
~ Daily=my_shape2_pv TDaily=MyTemp
~ Vminpu=0.001
~ Model=1
