// P-T curve is per unit of rated Pmpp vs temperature
// This one is for a Pmpp stated at 25 deg
New XYCurve.MyPvsT npts=4  xarray=[0 25 75 100]  yarray=[1.0 1.0 1.0 1.0]

// efficiency curve is per unit eff vs per unit power
New XYCurve.MyEff npts=4  xarray=[.1  .2  .4  1.0]  yarray=[1.0 1.0 1.0 1.0]

// 24-hr temp shape curve
New Tshape.MyTemp npts=144 minterval=10 temp=[25.0,25.0,25.0,25.0,25.0,25.8,26.7,27.5,28.3,29.2,30.0,30.8,31.7,32.5,33.3,34.2,35.0,35.6,36.3,36.9,37.5,38.1,38.8,39.4]
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
redirect LoadShapePV_2.dss

// pv definition
New PVSystem.PV_671 phases=3 bus1=671 kV=2.4018 kVA=500 irrad=1 Pmpp=500 temperature=25 PF=1 effcurve=Myeff P-TCurve=MyPvsT Daily=MyShapePV1 TDaily=MyTemp %Cutin=0.1 %Cutout=0.1 %Pmpp=100
